folder simulations: version=37; creator=Apsim 7.10-r0
  simulation Hindcast
    metfile met: filename=Dalby.met
    patchinput: filename=Dalby.e01.1-aug.patch.met
    clock
    summaryfile
    area paddock
      Soil: SoilType=Black Vertosol; LocalName=Waco; Site=Jimbour; NearestTown=Jimbour, Q 4352; Region=South East Queensland; NaturalVegetation=Grassland, mainly Qld bluegrass; Latitude=0; Longitude=0; YearOfSampling=0
        InitialWater Initial water: FractionFull=0.1; PercentMethod=FilledFromTop; RelativeTo=ll15
        Water
          Thickness  BD    AirDry  LL15  DUL   SAT
          150        1.02  0.145   0.29  0.54  0.59
          150        1.03  0.26    0.29  0.53  0.58
          300        1.02  0.29    0.29  0.54  0.59
          300        1.02  0.29    0.29  0.54  0.58
          300        1.06  0.3     0.3   0.52  0.57
          300        1.11  0.31    0.31  0.5   0.55
          300        1.12  0.32    0.32  0.5   0.55
          300        1.15  0.33    0.33  0.48  0.53
          300        1.18  0.34    0.34  0.47  0.52
          300        1.2   0.35    0.35  0.46  0.51
          300        1.25  0.36    0.36  0.44  0.49
          SoilCrop Barley
            LL=[0.29, 0.29, 0.32, 0.38, 0.39, 0.39, 0.41, 0.48, 0.47, 0.46, 0.44]
            KL=[0.1, 0.1, 0.08, 0.06, 0.04, 0.02, 0.01, 0, 0, 0, 0]
            XF=[1, 1, 1, 1, 1, 1, 1, 0, 0, 0, 0]
          SoilCrop Chickpea
            LL=[0.29, 0.29, 0.36, 0.43, 0.51, 0.5, 0.5, 0.48, 0.47, 0.46, 0.44]
            KL=[0.1, 0.1, 0.08, 0.06, 0.04, 0.02, 0.01, 0, 0, 0, 0]
            XF=[1, 1, 1, 1, 1, 1, 1, 0, 0, 0, 0]
          SoilCrop Lucerne
            LL=[0.29, 0.29, 0.29, 0.29, 0.3, 0.31, 0.32, 0.33, 0.34, 0.35, 0.36]
            KL=[0.1, 0.1, 0.1, 0.1, 0.09, 0.09, 0.09, 0.09, 0.09, 0.09, 0.09]
            XF=[1, 1, 1, 1, 1, 1, 1, 1, 1, 1, 1]
          SoilCrop Maize
            LL=[0.29, 0.29, 0.34, 0.34, 0.37, 0.4, 0.42, 0.48, 0.47, 0.46, 0.44]
            KL=[0.1, 0.1, 0.1, 0.08, 0.06, 0.04, 0.02, 0, 0, 0, 0]
            XF=[1, 1, 1, 1, 1, 1, 1, 0, 0, 0, 0]
          SoilCrop Perennial Grass
            LL=[0.29, 0.29, 0.39, 0.41, 0.4, 0.4, 0.41, 0.41, 0.4, 0.4, 0.42]
            KL=[0.1, 0.1, 0.1, 0.1, 0.09, 0.07, 0.05, 0, 0, 0, 0]
            XF=[1, 1, 1, 1, 1, 1, 1, 0, 0, 0, 0]
          SoilCrop Sorghum
            LL=[0.29, 0.29, 0.35, 0.38, 0.4, 0.4, 0.4, 0.48, 0.47, 0.46, 0.44]
            KL=[0.1, 0.1, 0.1, 0.08, 0.06, 0.04, 0.02, 0, 0, 0, 0]
            XF=[1, 1, 1, 1, 1, 1, 1, 0, 0, 0, 0]
          SoilCrop Wheat
            LL=[0.29, 0.29, 0.32, 0.32, 0.35, 0.38, 0.41, 0.48, 0.47, 0.46, 0.44]
            KL=[0.1, 0.1, 0.08, 0.06, 0.04, 0.02, 0.01, 0, 0, 0, 0]
            XF=[1, 1, 1, 1, 1, 1, 1, 0, 0, 0, 0]
        SoilWater: SummerCona=3.5; SummerU=6; SummerDate=1-Nov; WinterCona=3.5; WinterU=6; WinterDate=1-Apr; DiffusConst=40; DiffusSlope=16; Salb=0.13; CN2Bare=73; CNRed=20; CNCov=0.8; Thickness=[150, 150, 300, 300, 300, 300, 300, 300, 300, 300, 300]; SWCON=[0.3, 0.3, 0.3, 0.3, 0.3, 0.3, 0.3, 0.3, 0.3, 0.3, 0.3]
        SoilOrganicMatter: RootCN=40; RootWt=200; SoilCN=12.5; EnrACoeff=7.4; EnrBCoeff=0.2; OCUnits=Total
          Thickness  OC    FBiom  FInert
          150        1.04  0      1
          150        0.89  0      1
          300        0.89  0      1
          300        0.89  0      1
          300        0.77  0      1
          300        0.45  0      1
          300        0.27  0      1
          300        0.22  0      1
          300        0.16  0      1
          300        0.13  0      1
          300        0.12  0      1
        Analysis: PHUnits=Water; BoronUnits=HotWater
          Thickness  EC    PH   ParticleSizeSand  ParticleSizeSilt  ParticleSizeClay
          150        0.2   8.4  22                16                62
          150        0.25  8.8  22                16                62
          300        0.31  9    22                16                62
          300        0.4   9.2  22                16                62
          300        0.59  9.2  22                16                62
          300        0.84  9.1  22                16                62
          300        0.93  9    22                16                62
          300        1.01  9    22                16                62
          300        1.06  8.9  22                16                62
          300        1.05  8.9  22                16                62
          300        1.01  8.9  22                16                62
          999999     -     -    22                16                62
        Sample Initial nitrogen: NO3Units=kgha; NH4Units=kgha; SWUnits=Volumetric; OCUnits=Total; PHUnits=Water
          Thickness  NO3  NH4
          150        50   3
          150        0    0
          300        0    0
          300        0    0
          300        0    0
          300        0    0
          300        0    0
          300        0    0
          300        0    0
          300        0    0
          300        0    0
        SoilTemperature2: MaxTTimeDefault=14; BoundaryLayerConductanceSource=calc; BoundaryLayerConductance=20; BoundaryLayerConductanceIterations=1; NetRadiationSource=calc; DefaultWindSpeed=3; DefaultAltitude=18; DefaultInstrumentHeight=1.2; BareSoilHeight=57
      surfaceom SurfaceOrganicMatter
        PoolName = wheat  # Organic Matter pool name
        type = wheat  # Organic Matter type
        mass = 1000  # Initial surface residue (kg/ha)
        cnr = 80  # C:N ratio of initial residue
        standing_fraction = 0  # Fraction of residue standing
      fertiliser
      folder Manager folder
        manager Site
          site = Dalby
          emember = obs  # Ensemble member
          on init:
```
site = '[site]'
emember = '[emember]'
```
        manager Resets
          # When should a reset be done
          sowdate = 1-aug  # Enter date of reset (dd-mmm)
          # Reset details
          soilmodule = Soil  # Name of your soil module
          surfaceommodule = SurfaceOrganicMatter  # Name of your surface organic matter module
          pmodule = Phosphorus  # Name of your phosphorus module
          resetWater = yes  # Reset soil water?
          resetNitrogen = yes  # Reset soil nitrogen?
          resetSurfaceOM = yes  # Reset surface organic matter?
          resetP = no  # Reset phosphorus?
          on start_of_day:
```
         if (today = date('[sowdate]')) then
                '[soilmodule] Water' reset
                '[soilmodule] Nitrogen' reset
                '[surfaceommodule]' reset
                !SoilTemperature2 set gAveTsoil = 18.197 17.867 17.089 17.205 18.101 19.202 20.278 21.256 22.117 22.866 23.520 
                SoilTemperature2 init2
                !SoilTemperature reset
            act_mods reseting
         endif
```
          on prenewmet:
```
         if (met.maxt < (met.mint + 1)) then
            met.maxt = met.mint + 1
         endif
         if (met.radn < 5) then
            met.radn = 5
         endif
         if (met.radn > 30) then
            met.radn = 30
         endif
         ! Ensure soiltemp guesses the same starting conditions each year
         ! vvv autogenerated vvv
```
        manager2 Report on specific days
          # Don't forget to remove any reporting frquency variables from your selected Outputfile.
          sowdate = 1-aug  # Enter date of reset (dd-mmm)
          reset_days = 120  # Enter days to monitor after reset (n)
          dailymodule = daily  # The daily output module to report to.
          seasonmodule = season  # The season output module to report to.
```csharp
using System;
using ModelFramework;
using CSGeneral;

public class Script 
{      
   [Link] Paddock paddock;
   [Input] DateTime Today; 
   [Param] [Output] string sowdate;
   [Param] int reset_days;
   [Param] string dailymodule;
   [Param] string seasonmodule;

   private Outputfile dailyOutput;
   private Outputfile seasonOutput;

   [EventHandler] public void OnInitialised()
   {
      dailyOutput = (Outputfile) paddock.LinkByName(dailymodule);
      seasonOutput = (Outputfile) paddock.LinkByName(seasonmodule);
      cropIn = false;
      emergDAS = -1;
   }

   private bool cropIn;
   [Output] public int emergDAS;
   [EventHandler] public void OnSowing()
   {
      cropIn = true;
      emergDAS = -1;
   }
   [EventHandler] public void OnHarvesting() 
   {
      cropIn = false;
      emergDAS = -1;
   }

   [EventHandler] public void OnPost()
   {
      DateTime t0 = DateUtility.GetDate(sowdate, Today);
      DateTime t1;
      int[] daysAfter = {7, 14, 21, 30};
      foreach (var i in daysAfter) {
         t1 = t0.AddDays(i);
         if (Today.CompareTo(t0) >= 0 && Today.CompareTo(t1) == 0) {
            paddock.Publish("reset" + i.ToString());
            Console.WriteLine("Reset day " + i.ToString() + "=" + Today);
         }
      }
      t1 = t0.AddDays(reset_days);
      if (Today.CompareTo(t0) >= 0 && Today.CompareTo(t1) <= 0 ) {
          dailyOutput.DoOutput();
      }
//      if (Today.CompareTo(t0) >= 0 && Today.CompareTo(t1) == 0) {
//          seasonOutput.DoOutput();
//      }
   }  
}
```
        manager2 PTQ
```csharp
using System;
using ModelFramework;
using CSGeneral;

public class Script
{
   private ManagerUtility.Tracker<double> ptqTracker; 
   private ManagerUtility.Tracker<int> mint14_2Tracker; 
   private ManagerUtility.Tracker<int> mint14_1Tracker; 
   private ManagerUtility.Tracker<int> mint14_0Tracker; 
   private ManagerUtility.Tracker<int> mint7_2Tracker; 
   private ManagerUtility.Tracker<int> mint7_1Tracker; 
   private ManagerUtility.Tracker<int> mint7_0Tracker; 
   private ManagerUtility.Tracker<int> avgst7_12Tracker; 
   private ManagerUtility.Tracker<int> avgst14_12Tracker; 
   private ManagerUtility.Tracker<int> avgst21_12Tracker; 
   [EventHandler] public void OnInitialised()
   {
      ptqTracker = new ManagerUtility.Tracker<double>(30); 
      mint7_2Tracker= new ManagerUtility.Tracker<int>(7); 
      mint7_1Tracker= new ManagerUtility.Tracker<int>(7); 
      mint7_0Tracker= new ManagerUtility.Tracker<int>(7); 
      mint14_2Tracker= new ManagerUtility.Tracker<int>(14); 
      mint14_1Tracker= new ManagerUtility.Tracker<int>(14); 
      mint14_0Tracker= new ManagerUtility.Tracker<int>(14); 
      avgst7_12Tracker= new ManagerUtility.Tracker<int>(7); 
      avgst14_12Tracker= new ManagerUtility.Tracker<int>(14); 
      avgst21_12Tracker= new ManagerUtility.Tracker<int>(21); 
   }

   // Daily tests common to all paddocks
   [EventHandler] public void OnNewMet(NewMetType n)
   {
      ptqTracker.Add( n.radn / ( (n.maxt + n.mint) / 2.0 ) );
      mint14_2Tracker.Add( n.mint < 2 ? 1 : 0);
      mint14_1Tracker.Add( n.mint < 1 ? 1 : 0);
      mint14_0Tracker.Add( n.mint < 0 ? 1 : 0);
      mint7_2Tracker.Add( n.mint < 2 ? 1 : 0);
      mint7_1Tracker.Add( n.mint < 1 ? 1 : 0);
      mint7_0Tracker.Add( n.mint < 0 ? 1 : 0);
   }
   
   [Input] private double[] mint_soil;
   [EventHandler] public void OnPost()
   {
      avgst7_12Tracker.Add( mint_soil[0] < 12.0? 1 : 0);
      avgst14_12Tracker.Add( mint_soil[0] < 12.0? 1 : 0);
      avgst21_12Tracker.Add( mint_soil[0] < 12.0? 1 : 0);
   }
   [Output, Description("Sum of photo thermal quotient for last 30 days")] public double ptq30  {
      get { return(ptqTracker.Sum()); }
      set { }
   }
   [Output, Description("number of mint less than 2oC over last 7 days")] public int mint_2_7  {
      get { return(mint7_2Tracker.Sum() ); }
      set { }
   }
   [Output, Description("number of mint less than 1oC over last 7 days")] public int mint_1_7  {
      get { return(mint7_1Tracker.Sum() ); }
      set { }
   }
   [Output, Description("number of mint less than 0 oC over last 7 days")] public int mint_0_7  {
      get { return(mint7_0Tracker.Sum() ); }
      set { }
   }
   [Output, Description("number of mint less than 2oC over last 14 days")] public int mint_2_14  {
      get { return(mint14_2Tracker.Sum() ); }
      set { }
   }
   [Output, Description("number of mint less than 1oC over last 14 days")] public int mint_1_14  {
      get { return(mint14_1Tracker.Sum() ); }
      set { }
   }
   [Output, Description("number of mint less than 0 oC over last 14 days")] public int mint_0_14  {
      get { return(mint14_0Tracker.Sum() ); }
      set { }
   }

   [Output, Description("number of avg_sw_(1) less than 12 oC over last 7 days")] public int avgst7_12  {
      get { return(avgst7_12Tracker.Sum() ); }
      set { }
   }
   [Output, Description("number of avg_sw_(1) less than 12 oC over last 14 days")] public int avgst14_12  {
      get { return(avgst14_12Tracker.Sum() ); }
      set { }
   }
   [Output, Description("number of avg_sw_(1) less than 12 oC over last 21 days")] public int avgst21_12  {
      get { return(avgst21_12Tracker.Sum() ); }
      set { }
   }

}
```
      outputfile Daily: filename=Hindcast Daily.out; title=Hindcast Daily; events=Reporting Frequency
        variables
          variable:
            dd/mm/yyyy as Date
            site
            emember
            sowdate
            esw
            sw_dep(1) as swdep_1
            ave_soil_temp(1) as soil_temp_1
            mint_soil(1) as soil_mint_1
      tracker
        variable:
          average of mint_soil(1) on end_of_day from reseting to reset7 as avg_st_1_7
          average of mint_soil(1) on end_of_day from reseting to reset14 as avg_st_1_14
          average of mint_soil(1) on end_of_day from reseting to reset21 as avg_st_1_21
          average of mint_soil(1) on end_of_day from reseting to reset30 as avg_st_1_30
          average of mint_soil(1) on end_of_day from reset7 to reset14 as avg_st_7_14
          average of mint_soil(1) on end_of_day from reset14 to reset21 as avg_st_14_21
          value of mint_2_7 on reset7 as n_mint_7_2
          value of mint_1_7 on reset7 as n_mint_7_1
          value of mint_0_7 on reset7 as n_mint_7_0
          value of mint_2_14 on reset14 as n_mint_14_2
          value of mint_1_14 on reset14 as n_mint_14_1
          value of mint_0_14 on reset14 as n_mint_14_0
          value of mint_2_14 on fi_7 as n_mint_fi_2
          value of mint_1_14 on fi_7 as n_mint_fi_1
          value of mint_0_14 on fi_7 as n_mint_fi_0
          value of avgst7_12 on reset7 as n_avgst7_12
          value of avgst14_12 on reset14 as n_avgst14_12
          value of avgst21_12 on reset21 as n_avgst21_12
