folder simulations: version=37; creator=Apsim 7.10-r0
  simulation Forecast Template
    metfile met: filename=Dalby.met
    clock
    summaryfile
    area paddock
      Soil: SoilType=Black Vertosol; LocalName=Waco; Site=Jimbour; NearestTown=Jimbour, Q 4352; Region=South East Queensland; NaturalVegetation=Grassland, mainly Qld bluegrass; Latitude=0; Longitude=0; YearOfSampling=0
        // <SoilTemperature>
        // <BoundaryLayerConductance>20</BoundaryLayerConductance>
        // <Thickness>
        // <double>100</double>
        // <double>200</double>
        // <double>300</double>
        // </Thickness>
        // <InitialSoilTemperature>
        // <double>13</double>
        // <double>12</double>
        // <double>12</double>
        // </InitialSoilTemperature>
        // </SoilTemperature>
        InitialWater Initial water: FractionFull=1; PercentMethod=FilledFromTop
        Water
          Thickness  BD    AirDry  LL15  DUL   SAT
          150        1.02  0.145   0.29  0.54  0.59
          150        1.03  0.26    0.29  0.53  0.58
          300        1.02  0.29    0.29  0.54  0.59
          300        1.02  0.29    0.29  0.54  0.58
          300        1.06  0.3     0.3   0.52  0.57
          300        1.11  0.31    0.31  0.5   0.55
          300        1.12  0.32    0.32  0.5   0.55
          300        1.15  0.33    0.33  0.48  0.53
          300        1.18  0.34    0.34  0.47  0.52
          300        1.2   0.35    0.35  0.46  0.51
          300        1.25  0.36    0.36  0.44  0.49
        SoilWater: SummerCona=3.5; SummerU=6; SummerDate=1-Nov; WinterCona=3.5; WinterU=6; WinterDate=1-Apr; DiffusConst=40; DiffusSlope=16; Salb=0.13; CN2Bare=73; CNRed=20; CNCov=0.8; Thickness=[150, 150, 300, 300, 300, 300, 300, 300, 300, 300, 300]; SWCON=[0.3, 0.3, 0.3, 0.3, 0.3, 0.3, 0.3, 0.3, 0.3, 0.3, 0.3]
        SoilOrganicMatter: RootCN=40; RootWt=200; SoilCN=12.5; EnrACoeff=7.4; EnrBCoeff=0.2; OCUnits=Total
          Thickness  OC    FBiom  FInert
          150        1.04  0      1
          150        0.89  0      1
          300        0.89  0      1
          300        0.89  0      1
          300        0.77  0      1
          300        0.45  0      1
          300        0.27  0      1
          300        0.22  0      1
          300        0.16  0      1
          300        0.13  0      1
          300        0.12  0      1
        Analysis: PHUnits=Water; BoronUnits=HotWater
          Thickness  EC    PH   ParticleSizeSand  ParticleSizeSilt  ParticleSizeClay
          150        0.2   8.4  22                16                62
          150        0.25  8.8  22                16                62
          300        0.31  9    22                16                62
          300        0.4   9.2  22                16                62
          300        0.59  9.2  22                16                62
          300        0.84  9.1  22                16                62
          300        0.93  9    22                16                62
          300        1.01  9    22                16                62
          300        1.06  8.9  22                16                62
          300        1.05  8.9  22                16                62
          300        1.01  8.9  22                16                62
        Sample Initial nitrogen: NO3Units=ppm; NH4Units=ppm; SWUnits=Volumetric; OCUnits=Total; PHUnits=Water
          Thickness  NO3  NH4
          150        0    0
          150        0    0
          300        0    0
          300        0    0
          300        0    0
          300        0    0
          300        0    0
          300        0    0
          300        0    0
          300        0    0
          300        0    0
        SoilTemperature2: MaxTTimeDefault=14; BoundaryLayerConductanceSource=calc; BoundaryLayerConductance=20; BoundaryLayerConductanceIterations=1; NetRadiationSource=calc; DefaultWindSpeed=3; DefaultAltitude=18; DefaultInstrumentHeight=1.2; BareSoilHeight=57
      surfaceom SurfaceOrganicMatter
        PoolName = wheat  # Organic Matter pool name
        type = wheat  # Organic Matter type
        mass = 1000  # Initial surface residue (kg/ha)
        cnr = 80  # C:N ratio of initial residue
        standing_fraction = 0  # Fraction of residue standing
      fertiliser
      sorghum
      folder Manager folder
        manager Site
          site =
          emember =  # Ensemble member
          on init:
```
site = '[site]'
emember = '[emember]'
```
        manager2 Crop Management
          # Crop properties
          crop = sorghum  # Name of this crop
          # Sowing criteria
          sowdate = 1-aug  # Enter sowing window START date (dd-mmm)
          date3 = na  # Enter cultivar change date (na if not in use)
          must_sow = yes
          rain_amount = 30  # Enter amount of cumulative rainfall (mm)
          rain_days = 3  # Enter number of days to accumulate rainfall (days)
          esw_amount = 200  # Enter amount of soil water (mm)
          # Sowing Parameters
          cultivar1 = early  # Enter cultivar
          cultivar2 = na  # Enter 2nd Cultivar (na if not using a second cultivar)
          density1 = 7  # Enter sowing density (plants/m2)
          depth1 = 30  # Enter sowing depth (mm)
          row_spacing1 = 1000  # Enter row spacing (mm)
          # Extra Parameters
          ftn1 = na  # Enter Fertile Tiller Number (na for auto)
          skiprow1 = solid  # Skip row
          tillageImplement = na  # Name of tillage implement (na if not in use)
```csharp
using System;
using ModelFramework;
using CSGeneral;

// Basic crop management: sowing & harvesting.
// Multi-paddock aware.
// This component DOES NOT require a trigger from the sequencer.
// It will assume it is the only crop in the system if it doesnt find a sequencer.
// If it does find a sequencer, it will do nothing until told to (via Enter/Leave).
public class Script 
{      
   [Link()]  public Simulation MySimulation;
   
   [Param()] private string crop;         // The module name of this crop
   [Param()] private string sowdate;         //Start of sowing window
   [Param()] int esw_amount;
   [Param()] private string must_sow;

   [Input()] private DateTime today;

   // Rainfall accumulator
   [Param()] int rain_days;              //check for rain over this period
   [Param()] int rain_amount;            //this much rain over that period

   // Daily rainfall from the system
   [Input] private double rain;
   private ManagerUtility.Tracker<double> rainTracker; 

   private bool inWindow = false;
   private bool endOfWindow = false;
   private bool ChangeCultivar = false;

   //initialise tracker, telling it how many days to track
   [EventHandler] public void OnInitialised()
   {
      rainTracker = new ManagerUtility.Tracker<double>(rain_days); 
   }

   // Daily tests common to all paddocks
   [EventHandler] public void OnPrepare()
   {
      bool startOfWindow = DateUtility.DatesEqual(sowdate, today);

      inWindow = DateUtility.WithinDates(sowdate, today, sowdate);
      ChangeCultivar = false;
      endOfWindow = DateUtility.DatesEqual(sowdate, today);

      rainTracker.Add(rain);
      string currentPaddock = "";
      if (MySimulation.Get("currentPaddock", out currentPaddock) == false) 
      {
         // If there is no sequencer plugged in then we are it..
         if (canEnter > 0) {
            OnEnter();
         }
         if (canLeave > 0) {
            OnLeave();
         }
      }
   }
   // Test whether we can sow a crop today
   // +ve number - yes
   // 0          - no
   // -ve number - no, out of scope (planting window)
   [Output, Description("Test whether we can sow a crop today")] public int canEnter  {
      get {
         bool isPossibleToday = false;
         
         string currentPaddock;
         MySimulation.Get("currentPaddock", out currentPaddock);
         //Console.WriteLine("1. '" + currentPaddock + "'");

         Component paddockModule;
         if (currentPaddock != "")
            paddockModule = (Component) MySimulation.LinkByName(currentPaddock);
         else
            paddockModule = (Component) MySimulation.ChildPaddocks[0];
         //Console.WriteLine("2. " + paddockModule.Name);

         Component cropModule = (Component) paddockModule.LinkByName( crop );

         //Console.WriteLine("3. " + cropModule.Name);
         string plantStatus = "";
         cropModule.Get("plant_status", out plantStatus);

         double esw = 0.0;
         Component soilModule = (Component) paddockModule.LinkByType("SoilWat");
         soilModule.Get("esw", out esw);
         if (plantStatus == "out" &&
             inWindow &&
             rainTracker.Sum() >= rain_amount &&
             esw > esw_amount) 
         {
             isPossibleToday = true;
         } 

	     if (isPossibleToday)
            return 1;
         
         if (plantStatus == "out" && endOfWindow && must_sow == "yes")
            return 1;

         if (plantStatus == "out" && !inWindow)
            return -1;
         
         return 0;
      }
   }  
   
   
   // Sow a crop
   [Param()] private string cultivar1;
   [Param()] private string cultivar2;
   [Param()] private double density1;
   [Param()] private double depth1;
   [Param()] private double row_spacing1;
   [Param()] private string ftn1;
   [Param()] private string skiprow1;
   [Param()] private string tillageImplement;
   
   [EventHandler, Description("Sow the crop")] public void OnEnter()
   {
      Console.WriteLine(today + " Sowing Crop");
      SowType data = new SowType();
      data.Cultivar = cultivar1;
      if(ChangeCultivar)
         data.Cultivar = cultivar2;

      data.plants = density1;
      data.sowing_depth = depth1;
      data.row_spacing = row_spacing1;
      data.tiller_no_fertile = (ftn1 == "na") ? "" : ftn1;
      data.SkipRow = 0 ;
      if (skiprow1 == "single")
         data.SkipRow = 1;
      else if (skiprow1 == "double")
         data.SkipRow = 2;

      string currentPaddock;
      MySimulation.Get("currentPaddock", out currentPaddock);
      Component cropModule;
      if (currentPaddock != "")
         cropModule = (Component) MySimulation.LinkByName(currentPaddock + "." + crop);
      else 
         cropModule = (Component) MySimulation.ChildPaddocks[0].LinkByName(crop);

      cropModule.Publish("Sow", data);

      if (tillageImplement.ToLower() != "na") 
	  {
         TillageType t = new TillageType();
         t.type = tillageImplement;
         Component paddockModule;
         if (currentPaddock != "")
            paddockModule = (Component) MySimulation.LinkByName(currentPaddock);
         else
            paddockModule = MySimulation.ChildPaddocks[0];
         paddockModule.Publish("tillage", t);
      }		 
   }

   // Test whether we can harvest a crop today
   // +ve number - yes
   // 0          - no
   // -ve        - out of scope
   [Output] public int canLeave  
   {
      get 
      {
         string currentPaddock;
         MySimulation.Get("currentPaddock", out currentPaddock);

         string plantStatus = "";
         MySimulation.Get((currentPaddock != "" ? currentPaddock + "." : "") + crop + ".plant_status", out plantStatus);
         if (plantStatus == "out")
            return -1;

         string StageName = "";
         MySimulation.Get((currentPaddock != "" ? currentPaddock + "." : "") + crop + ".StageName", out StageName);
         if (StageName == "harvest_ripe" || plantStatus == "dead")
            return 1;
         return 0;
      }
   }

   [EventHandler] public void OnLeave()
   {
      Console.WriteLine(today + " Harvesting Crop");
      HarvestType hdata = new HarvestType();
      hdata.Remove = 0.0;
      string currentPaddock;
      MySimulation.Get("currentPaddock", out currentPaddock);
      Component cropModule;
      if (currentPaddock != "")
         cropModule = (Component) MySimulation.LinkByName(currentPaddock + "." + crop);
      else 
         cropModule = (Component) MySimulation.ChildPaddocks[0].LinkByName(crop);

      cropModule.Publish("harvest", hdata);

      KillCropType kdata = new KillCropType();
      kdata.KillFraction = 0.0F;
      cropModule.Publish("killcrop", kdata);
      cropModule.Publish("end_crop");
   } 
}
```
        manager Resets
          # When should a reset be done
          sowdate = 1-aug  # Enter date of reset (dd-mmm)
          # Reset details
          soilmodule = Soil  # Name of your soil module
          surfaceommodule = SurfaceOrganicMatter  # Name of your surface organic matter module
          pmodule = Phosphorus  # Name of your phosphorus module
          resetWater = yes  # Reset soil water?
          resetNitrogen = yes  # Reset soil nitrogen?
          resetSurfaceOM = yes  # Reset surface organic matter?
          resetP = no  # Reset phosphorus?
          on start_of_day:
```
         if (today = date('[sowdate]')) then
                '[soilmodule] Water' reset
                '[soilmodule] Nitrogen' reset
                '[surfaceommodule]' reset
                !SoilTemperature2 set gAveTsoil = 18.197 17.867 17.089 17.205 18.101 19.202 20.278 21.256 22.117 22.866 23.520 
                SoilTemperature2 init2
                !SoilTemperature reset
            act_mods reseting
         endif
```
          on prenewmet:
```
         if (met.maxt < (met.mint + 1)) then
            met.maxt = met.mint + 1
         endif
         if (met.radn < 5) then
            met.radn = 5
         endif
         if (met.radn > 30) then
            met.radn = 30
         endif
         ! Ensure soiltemp guesses the same starting conditions each year
         ! vvv autogenerated vvv
```
        manager2 Report on specific days
          # Don't forget to remove any reporting frquency variables from your selected Outputfile.
          sowdate = 1-aug  # Enter date of reset (dd-mmm)
          reset_days = 120  # Enter days to monitor after reset (n)
          dailymodule = daily  # The daily output module to report to.
          seasonmodule = season  # The season output module to report to.
```csharp
using System;
using ModelFramework;
using CSGeneral;

public class Script 
{      
   [Link] Paddock paddock;
   [Input] DateTime Today; 
   [Input] double stage;
   [Input] int DaysAfterSowing;
   [Param] [Output] string sowdate;
   [Param] int reset_days;
   [Param] string dailymodule;
   [Param] string seasonmodule;

   private Outputfile dailyOutput;
   private Outputfile seasonOutput;

   [EventHandler] public void OnInitialised()
   {
      dailyOutput = (Outputfile) paddock.LinkByName(dailymodule);
      seasonOutput = (Outputfile) paddock.LinkByName(seasonmodule);
      cropIn = false;
      emergDAS = -1;
   }

   private bool cropIn;
   [Output] public int emergDAS;
   [EventHandler] public void OnSowing()
   {
      cropIn = true;
      emergDAS = -1;
   }
   [EventHandler] public void OnHarvesting() 
   {
      cropIn = false;
      emergDAS = -1;
   }

   [EventHandler] public void OnPost()
   {
     if ((int)stage == 3 && emergDAS < 0) 
        emergDAS = DaysAfterSowing;
    
      DateTime t0 = DateUtility.GetDate(sowdate, Today);
      DateTime t1;
      int[] daysAfter = {7, 14, 21, 30};
      foreach (var i in daysAfter) {
         t1 = t0.AddDays(i);
         if (Today.CompareTo(t0) >= 0 && Today.CompareTo(t1) == 0) {
            paddock.Publish("reset" + i.ToString());
            Console.WriteLine("Reset day " + i.ToString() + "=" + Today);
         }
      }
      t1 = t0.AddDays(reset_days);
      if (Today.CompareTo(t0) >= 0 && Today.CompareTo(t1) <= 0) {
          dailyOutput.DoOutput();
      }
      if (Today.CompareTo(t0) >= 0 && Today.CompareTo(t1) == 0) {
          seasonOutput.DoOutput();
      }
   }  
}
```
        manager LAI
          on init:
```
peakLAI = 0
end_of_juvenile_das = 0
floral_initiation_das = 0
swStressAvg = -1
ptq_30_flowering = -1
DaysAfterFlowering = -1
DaysAfterFI = -1
```
          on end_of_day:
```
if (lai > peakLAI) then
   peakLAI = lai
endif

if (end_of_juvenile_das = 0 AND stageName = 'end_of_juvenile') then
   end_of_juvenile_das = daysAfterSowing
endif

if (DaysAfterFI >= 0) then
   DaysAfterFI = DaysAfterFI + 1
   if (DaysAfterFI = 7) then
       act_mods 'fi_7'
   endif   
endif

endif
if (floral_initiation_das <= 0 AND stageName = 'floral_initiation') then
   floral_initiation_das = daysAfterSowing
   DaysAfterFI = 0
endif

if (DaysAfterFlowering >= 0) then
   DaysAfterFlowering = DaysAfterFlowering + 1
endif
if (DaysAfterFlowering < 0 AND stageName = 'flowering') then
   DaysAfterFlowering = 0
   ptq_30_flowering = ptq30
endif

if (DaysAfterFlowering = 7) then
   swStressAvg = swdef_photo_14
endif
```
          on sowing:
          script: same as in Forecast Template.paddock.Manager folder.LAI
        manager2 PTQ
```csharp
using System;
using ModelFramework;
using CSGeneral;

public class Script
{
   private ManagerUtility.Tracker<double> ptqTracker; 
   private ManagerUtility.Tracker<double> swTracker; 
   private ManagerUtility.Tracker<int> mint14_2Tracker; 
   private ManagerUtility.Tracker<int> mint14_1Tracker; 
   private ManagerUtility.Tracker<int> mint14_0Tracker; 
   private ManagerUtility.Tracker<int> mint7_2Tracker; 
   private ManagerUtility.Tracker<int> mint7_1Tracker; 
   private ManagerUtility.Tracker<int> mint7_0Tracker; 
   private ManagerUtility.Tracker<int> avgst7_12Tracker; 
   private ManagerUtility.Tracker<int> avgst14_12Tracker; 
   private ManagerUtility.Tracker<int> avgst21_12Tracker; 
   [EventHandler] public void OnInitialised()
   {
      ptqTracker = new ManagerUtility.Tracker<double>(30); 
      swTracker = new ManagerUtility.Tracker<double>(14); 
      mint7_2Tracker= new ManagerUtility.Tracker<int>(7); 
      mint7_1Tracker= new ManagerUtility.Tracker<int>(7); 
      mint7_0Tracker= new ManagerUtility.Tracker<int>(7); 
      mint14_2Tracker= new ManagerUtility.Tracker<int>(14); 
      mint14_1Tracker= new ManagerUtility.Tracker<int>(14); 
      mint14_0Tracker= new ManagerUtility.Tracker<int>(14); 
      avgst7_12Tracker= new ManagerUtility.Tracker<int>(7); 
      avgst14_12Tracker= new ManagerUtility.Tracker<int>(14); 
      avgst21_12Tracker= new ManagerUtility.Tracker<int>(21); 
   }

   // Daily tests common to all paddocks
   [EventHandler] public void OnNewMet(NewMetType n)
   {
      ptqTracker.Add( n.radn / ( (n.maxt + n.mint) / 2.0 ) );
      mint14_2Tracker.Add( n.mint < 2 ? 1 : 0);
      mint14_1Tracker.Add( n.mint < 1 ? 1 : 0);
      mint14_0Tracker.Add( n.mint < 0 ? 1 : 0);
      mint7_2Tracker.Add( n.mint < 2 ? 1 : 0);
      mint7_1Tracker.Add( n.mint < 1 ? 1 : 0);
      mint7_0Tracker.Add( n.mint < 0 ? 1 : 0);
   }
   
   [Input] private double swdef_photo;
   [Input] private double[] mint_soil;
   [EventHandler] public void OnPost()
   {
      swTracker.Add( swdef_photo );
      avgst7_12Tracker.Add( mint_soil[0] < 12.0? 1 : 0);
      avgst14_12Tracker.Add( mint_soil[0] < 12.0? 1 : 0);
      avgst21_12Tracker.Add( mint_soil[0] < 12.0? 1 : 0);
   }
   [Output, Description("Sum of photo thermal quotient for last 30 days")] public double ptq30  {
      get { return(ptqTracker.Sum()); }
      set { }
   }
   [Output, Description("average of swdef_photo for last 14 days")] public double swdef_photo_14  {
      get { return(swTracker.Sum() / 14.0); }
      set { }
   }
   [Output, Description("number of mint less than 2oC over last 7 days")] public int mint_2_7  {
      get { return(mint7_2Tracker.Sum() ); }
      set { }
   }
   [Output, Description("number of mint less than 1oC over last 7 days")] public int mint_1_7  {
      get { return(mint7_1Tracker.Sum() ); }
      set { }
   }
   [Output, Description("number of mint less than 0 oC over last 7 days")] public int mint_0_7  {
      get { return(mint7_0Tracker.Sum() ); }
      set { }
   }
   [Output, Description("number of mint less than 2oC over last 14 days")] public int mint_2_14  {
      get { return(mint14_2Tracker.Sum() ); }
      set { }
   }
   [Output, Description("number of mint less than 1oC over last 14 days")] public int mint_1_14  {
      get { return(mint14_1Tracker.Sum() ); }
      set { }
   }
   [Output, Description("number of mint less than 0 oC over last 14 days")] public int mint_0_14  {
      get { return(mint14_0Tracker.Sum() ); }
      set { }
   }

   [Output, Description("number of avg_sw_(1) less than 12 oC over last 7 days")] public int avgst7_12  {
      get { return(avgst7_12Tracker.Sum() ); }
      set { }
   }
   [Output, Description("number of avg_sw_(1) less than 12 oC over last 14 days")] public int avgst14_12  {
      get { return(avgst14_12Tracker.Sum() ); }
      set { }
   }
   [Output, Description("number of avg_sw_(1) less than 12 oC over last 21 days")] public int avgst21_12  {
      get { return(avgst21_12Tracker.Sum() ); }
      set { }
   }

}
```
      outputfile Daily: filename=Sorghum Daily.out; title=Sorghum Daily; events=Reporting Frequency
        variables
          variable:
            dd/mm/yyyy as Date
            site
            emember
            sowdate
            esw
            sw_dep(1) as swdep_1
            ave_soil_temp(1) as soil_temp_1
            mint_soil(1) as soil_mint_1
      tracker
        variable:
          average of mint_soil(1) on end_of_day from reseting to reset7 as avg_st_1_7
          average of mint_soil(1) on end_of_day from reseting to reset14 as avg_st_1_14
          average of mint_soil(1) on end_of_day from reseting to reset21 as avg_st_1_21
          average of mint_soil(1) on end_of_day from reseting to reset30 as avg_st_1_30
          average of mint_soil(1) on end_of_day from reset7 to reset14 as avg_st_7_14
          average of mint_soil(1) on end_of_day from reset14 to reset21 as avg_st_14_21
          value of mint_2_7 on reset7 as n_mint_7_2
          value of mint_1_7 on reset7 as n_mint_7_1
          value of mint_0_7 on reset7 as n_mint_7_0
          value of mint_2_14 on reset14 as n_mint_14_2
          value of mint_1_14 on reset14 as n_mint_14_1
          value of mint_0_14 on reset14 as n_mint_14_0
          value of mint_2_14 on fi_7 as n_mint_fi_2
          value of mint_1_14 on fi_7 as n_mint_fi_1
          value of mint_0_14 on fi_7 as n_mint_fi_0
          value of avgst7_12 on reset7 as n_avgst7_12
          value of avgst14_12 on reset14 as n_avgst14_12
          value of avgst21_12 on reset21 as n_avgst21_12
  factorial Factorials: active=0
    settings
